Ve := 80
Td := 190
Ed := 79000
τd := 10
Qmin := 10
Tmin := 150
Qmax := 20
Tmax := 180
ΔQ := 0.5
ΔT := 2
M := (Qmax - Qmin)/ΔQ
N := (Tmax - Tmin)/ΔT
M = 20
N = 15
i := 0 .. M
j := 0 .. N
Q[i] := Qmin + i*ΔQ
T[j] := Tmin + j*ΔT
Id[i, j] := Ve/(τd*Q[i])*e^(Ed/(8.31*(T[j] + 273.15)*(Td + 273.15))*(T[j] - Td))*100
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Id = [
    11.4928, 12.774, 14.1839, 15.734, 17.4368, 19.3056, 21.3546, 23.5993, 26.0563, 28.7432, 31.6791, 34.8844, 38.381, 42.192, 46.3426, 50.8593;
    10.9455, 12.1657, 13.5084, 14.9848, 16.6065, 18.3863, 20.3377, 22.4756, 24.8155, 27.3745, 30.1706, 33.2233, 36.5533, 40.1829, 44.1358, 48.4375;
    10.448, 11.6127, 12.8944, 14.3037, 15.8517, 17.5505, 19.4133, 21.4539, 23.6875, 26.1302, 28.7992, 31.7131, 34.8918, 38.3564, 42.1296, 46.2358;
    9.99375, 11.1078, 12.3338, 13.6818, 15.1625, 16.7875, 18.5692, 20.5212, 22.6576, 24.9941, 27.5471, 30.3343, 33.3747, 36.6887, 40.2979, 44.2255;
    9.57734, 10.645, 11.8199, 13.1117, 14.5307, 16.088, 17.7955, 19.6661, 21.7136, 23.9527, 26.3993, 29.0704, 31.9841, 35.16, 38.6188, 42.3828;
    9.19425, 10.2192, 11.3471, 12.5872, 13.9495, 15.4445, 17.0837, 18.8795, 20.845, 22.9946, 25.3433, 27.9076, 30.7048, 33.7536, 37.0741, 40.6875;
    8.84062, 9.82612, 10.9107, 12.1031, 13.4129, 14.8504, 16.4266, 18.1533, 20.0433, 22.1102, 24.3686, 26.8342, 29.5238, 32.4554, 35.6482, 39.1226;
    8.51319, 9.46219, 10.5066, 11.6548, 12.9162, 14.3004, 15.8182, 17.481, 19.301, 21.2913, 23.466, 25.8403, 28.4303, 31.2534, 34.3279, 37.6736;
    8.20915, 9.12425, 10.1313, 11.2386, 12.4549, 13.7897, 15.2533, 16.8567, 18.6116, 20.5309, 22.628, 24.9175, 27.415, 30.1372, 33.1019, 36.3281;
    7.92607, 8.80962, 9.78197, 10.8511, 12.0254, 13.3142, 14.7273, 16.2754, 17.9699, 19.8229, 21.8477, 24.0582, 26.4696, 29.098, 31.9604, 35.0754;
    7.66187, 8.51597, 9.45591, 10.4894, 11.6246, 12.8704, 14.2364, 15.7329, 17.3709, 19.1621, 21.1194, 23.2563, 25.5873, 28.128, 30.8951, 33.9062;
    7.41471, 8.24126, 9.15088, 10.151, 11.2496, 12.4552, 13.7772, 15.2254, 16.8105, 18.544, 20.4382, 22.5061, 24.7619, 27.2207, 29.8985, 32.8125;
    7.183, 7.98372, 8.86491, 9.83377, 10.898, 12.066, 13.3466, 14.7496, 16.2852, 17.9645, 19.7995, 21.8028, 23.9881, 26.37, 28.9641, 31.7871;
    6.96534, 7.74179, 8.59628, 9.53577, 10.5678, 11.7004, 12.9422, 14.3026, 15.7917, 17.4201, 19.1995, 21.1421, 23.2612, 25.5709, 28.0864, 30.8238;
    6.76048, 7.51409, 8.34345, 9.25531, 10.257, 11.3562, 12.5615, 13.882, 15.3272, 16.9078, 18.6348, 20.5203, 22.577, 24.8188, 27.2604, 29.9173;
    6.56732, 7.2994, 8.10506, 8.99087, 9.9639, 11.0318, 12.2026, 13.4853, 14.8893, 16.4247, 18.1024, 19.934, 21.932, 24.1097, 26.4815, 29.0625;
    6.38489, 7.09664, 7.87992, 8.74113, 9.68713, 10.7253, 11.8637, 13.1107, 14.4757, 15.9685, 17.5995, 19.3802, 21.3228, 23.44, 25.7459, 28.2552;
    6.21233, 6.90484, 7.66695, 8.50488, 9.42531, 10.4354, 11.543, 12.7564, 14.0845, 15.5369, 17.1239, 18.8565, 20.7465, 22.8065, 25.0501, 27.4915;
    6.04885, 6.72313, 7.46519, 8.28107, 9.17728, 10.1608, 11.2393, 12.4207, 13.7138, 15.128, 16.6732, 18.3602, 20.2005, 22.2063, 24.3908, 26.7681;
    5.89375, 6.55074, 7.27377, 8.06873, 8.94196, 9.9003, 10.9511, 12.1022, 13.3622, 14.7401, 16.2457, 17.8895, 19.6825, 21.6369, 23.7654, 26.0817;
    5.7464, 6.38698, 7.09193, 7.86701, 8.71841, 9.65279, 10.6773, 11.7997, 13.0281, 14.3716, 15.8396, 17.4422, 19.1905, 21.096, 23.1713, 25.4297
]
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